# Входное напряжение
Uin := 12 V
# Выставленное усиление (128 или 64)
GAIN := 128
# Питание подаваемое на пин AVDD (от 2.6 до 5.5V)
AVDD := 4.5 V
# АЦП HX711
# Цифровое питание АЦП
Iadc_d := 100 μA
# Аналоговое питание АЦП
Iadc_a := 1400*μA
# Входной диапазон
Urange := 0.5*(AVDD/GAIN) = 0.0175781 V
# Тензодатчик NA2
# Потребление тензодатчика
Isens := 14.2*mA
# Входное сопротивление по паспорту
R_in := 410 Ω
# Отклонение входного сопротивления
R_in_dev := 15 Ω
# Входное полное сопротивление
R_in_real := [R_in + R_in_dev; R_in - R_in_dev] = [425; 395] Ω
R_in := 395 Ω, 1 Ω .. 425 Ω  # disabled
# Выходное сопротивление по паспорту
R_out := 350 Ω
# Отклонение входного сопротивления
R_out_dev := 5 Ω
# Входное полное сопротивление
R_in_real := [R_out + R_out_dev; R_out - R_out_dev] = [355; 345] Ω
R_out := 395 Ω, 1 Ω .. 425 Ω  # disabled
# DC-DC PDS1-S12-S9-M-TR
# Макс. вых. ток
Idc_out_max := 111 mA
# Мин. вых. ток
Idc_out_min := 12 mA
# LDO XC6204B502MR-G
# Макс. вых. ток
Ildo_out_max := 150 mA
# Выходное напряжение
Uldo_out := 5 V
# Мин. вых. напряжение
Uldo_out_min := 0.97*Uldo_out = 4.85 V
# Макс. вых. напряжение
Uldo_out_max := 1.03*Uldo_out = 5.15 V
# Максимальное падение напряжения при нагрузке 30мА
Vldo_dropout_max := 90 mV
# Макс. изм. вых.напряжения от изм. тока нагрузки в диапазоне раб. температур
ΔVldo_out_max := 80 mV
# Макс. потребляемый ток
Ildo_in_max := 120 μA
# Выходной шум питания
Vldo_noise := 30 μV
